<?xml version='1.0' encoding='UTF-8'?>
<Lems>

  <!-- CA1 OLM cell -->

    <Target component="sim1"/>

    <Include file="Cells.xml"/>
    <Include file="Networks.xml"/>
    <Include file="Simulation.xml"/>

    <Include file="SaragaOLM_Case2.cell.nml"/>
    <Include file="SaragaOLM_Case2_short.net.nml"/>

    <Include file="Nasoma.channel.nml"/>
    <Include file="Nadend.channel.nml"/>
    <Include file="Ksoma.channel.nml"/>
    <Include file="Kdend.channel.nml"/>
    <Include file="IA.channel.nml"/>
    <Include file="Ih.channel.nml"/>
    <Include file="leak_chan.channel.nml"/>

<!-- Simulation specifications -->

    <Simulation id="sim1" length="500ms" step="0.001ms" target="network">

        <Display id="d1" title="Saraga 2003 CA1 OLM cell with 0.1nA input" timeScale="1ms" xmin="-10" xmax="210" ymin="-85" ymax="55">
            <Line id="OLM V" quantity="Pop_SaragaOLM_Case2/0/SaragaOLM_Case2/v" scale="1mV" color="#0000FF" timeScale="1ms"/>
        </Display>

        <OutputFile id="of0" fileName="saragaolm_short.dat">
            <OutputColumn id="olm" quantity="Pop_SaragaOLM_Case2/0/SaragaOLM_Case2/v"/>
        </OutputFile>

    </Simulation>

</Lems>
