<?xml version="1.0" encoding="UTF-8"?>
<neuroml xmlns="http://morphml.org/neuroml/schema"
    xmlns:mml="http://morphml.org/morphml/schema"
    xmlns:meta="http://morphml.org/metadata/schema"
    xmlns:bio="http://morphml.org/biophysics/schema"
    xmlns:cml="http://morphml.org/channelml/schema"
    xmlns:xsi="http://www.w3.org/2001/XMLSchema-instance"
    xsi:schemaLocation="http://morphml.org/neuroml/schema http://www.neuroml.org/NeuroMLValidator/NeuroMLFiles/Schemata/v1.8.1/Level3/NeuroML_Level3_v1.8.1.xsd"
    name = "NeuroML Level 2 file exported from NEURON"
    lengthUnits="micron">

<meta:notes>NeuroML Level 2 file generated from ModelView by: NEURON -- Release 7.3 (1173+:c2415b59f252+) 2014-10-07
Authors: Michael Hines, Sushil Kambampati and Padraig Gleeson,
Yale University and UCL</meta:notes>

<cells>
  <cell name="soma_0">
    <meta:notes>Cell: soma_0 exported from NEURON ModelView</meta:notes>
    <segments  xmlns="http://morphml.org/morphml/schema"> <!-- Changing the namespace from neuroml to morphml-->
<!-- Section: soma[0] -->
      <segment id="0" name = "Seg0_soma_0" cable = "0">
        <proximal x="-14" y="-164" z="0" diameter="9.22"/>
        <distal x="-11.08" y="-164" z="0" diameter="9.22"/>
      </segment>
<!-- Section: dend2[0] -->
      <segment id="10" name = "Seg0_dend2_0" parent="0" cable = "9">  <!-- Connected at 0 on parent section: soma[0]  -->
        <proximal x="-14" y="-164" z="0" diameter="1.07"/>
        <distal x="-16.7235" y="-158.553" z="0" diameter="1.07"/>
      </segment>
<!-- Section: soma[1] -->
      <segment id="2" name = "Seg0_soma_1" parent="0" cable = "1">  <!-- Connected at 0 on parent section: soma[0]  -->
        <proximal x="-14" y="-164" z="0" diameter="8.03"/>
        <distal x="-16.92" y="-164" z="0" diameter="8.03"/>
      </segment>
<!-- Section: dend4[0] -->
      <segment id="16" name = "Seg0_dend4_0" parent="0" cable = "15">  <!-- Parent section: soma[0] -->
        <proximal x="-11.08" y="-164" z="0" diameter="1.38"/>
        <distal x="-11.08" y="-126.28" z="0" diameter="1.38"/>
      </segment>
<!-- Section: soma[2] -->
      <segment id="3" name = "Seg0_soma_2" parent="0" cable = "2">  <!-- Parent section: soma[0] -->
        <proximal x="-11.08" y="-164" z="0" diameter="9.82"/>
        <distal x="-8.16" y="-164" z="0" diameter="9.82"/>
      </segment>
<!-- Section: dend3[0] -->
      <segment id="38" name = "Seg0_dend3_0" parent="10" cable = "37">  <!-- Parent section: dend2[0] -->
        <proximal x="-16.7235" y="-158.553" z="0" diameter="0.68"/>
        <distal x="-100.264" y="-158.553" z="0" diameter="0.68"/>
      </segment>
<!-- Section: dend2[1] -->
      <segment id="11" name = "Seg0_dend2_1" parent="10" cable = "10">  <!-- Parent section: dend2[0] -->
        <proximal x="-16.7235" y="-158.553" z="0" diameter="0.89"/>
        <distal x="-93.3491" y="-120.24" z="0" diameter="0.89"/>
      </segment>
<!-- Section: dend1[0] -->
      <segment id="40" name = "Seg0_dend1_0" parent="2" cable = "39">  <!-- Parent section: soma[1] -->
        <proximal x="-16.92" y="-164" z="0" diameter="1.29"/>
        <distal x="-112.958" y="-144.792" z="0" diameter="1.29"/>
      </segment>
<!-- Section: soma[3] -->
      <segment id="4" name = "Seg0_soma_3" parent="2" cable = "3">  <!-- Parent section: soma[1] -->
        <proximal x="-16.92" y="-164" z="0" diameter="6.78"/>
        <distal x="-19.84" y="-164" z="0" diameter="6.78"/>
      </segment>
<!-- Section: dend4[2] -->
      <segment id="18" name = "Seg0_dend4_2" parent="16" cable = "17">  <!-- Parent section: dend4[0] -->
        <proximal x="-11.08" y="-126.28" z="0" diameter="1.07"/>
        <distal x="-11.08" y="-105.28" z="0" diameter="1.07"/>
      </segment>
<!-- Section: dend4[1] -->
      <segment id="17" name = "Seg0_dend4_1" parent="16" cable = "16">  <!-- Parent section: dend4[0] -->
        <proximal x="-11.08" y="-126.28" z="0" diameter="1.15"/>
        <distal x="0.279225" y="-103.562" z="0" diameter="1.15"/>
      </segment>
<!-- Section: soma[4] -->
      <segment id="5" name = "Seg0_soma_4" parent="3" cable = "4">  <!-- Parent section: soma[2] -->
        <proximal x="-8.16" y="-164" z="0" diameter="7.6"/>
        <distal x="-5.24" y="-164" z="0" diameter="7.6"/>
      </segment>
<!-- Section: dend3[1] -->
      <segment id="39" name = "Seg0_dend3_1" parent="38" cable = "38">  <!-- Parent section: dend3[0] -->
        <proximal x="-100.264" y="-158.553" z="0" diameter="0.64"/>
        <distal x="-161.81" y="-220.1" z="0" diameter="0.64"/>
      </segment>
<!-- Section: dend2[3] -->
      <segment id="13" name = "Seg0_dend2_3" parent="11" cable = "12">  <!-- Parent section: dend2[1] -->
        <proximal x="-93.3491" y="-120.24" z="0" diameter="0.68"/>
        <distal x="-111.359" y="-120.24" z="0" diameter="0.68"/>
      </segment>
<!-- Section: dend2[2] -->
      <segment id="12" name = "Seg0_dend2_2" parent="11" cable = "11">  <!-- Parent section: dend2[1] -->
        <proximal x="-93.3491" y="-120.24" z="0" diameter="0.68"/>
        <distal x="-164.19" y="-63.5678" z="0" diameter="0.68"/>
      </segment>
<!-- Section: dend1[2] -->
      <segment id="42" name = "Seg0_dend1_2" parent="40" cable = "41">  <!-- Parent section: dend1[0] -->
        <proximal x="-112.958" y="-144.792" z="0" diameter="1.07"/>
        <distal x="-164.51" y="-127.609" z="0" diameter="1.07"/>
      </segment>
<!-- Section: dend1[1] -->
      <segment id="41" name = "Seg0_dend1_1" parent="40" cable = "40">  <!-- Parent section: dend1[0] -->
        <proximal x="-112.958" y="-144.792" z="0" diameter="0.86"/>
        <distal x="-120.757" y="-152.592" z="0" diameter="0.86"/>
      </segment>
<!-- Section: dend7[0] -->
      <segment id="60" name = "Seg0_dend7_0" parent="4" cable = "59">  <!-- Parent section: soma[3] -->
        <proximal x="-19.84" y="-164" z="0" diameter="0.91"/>
        <distal x="-15.0414" y="-173.597" z="0" diameter="0.91"/>
      </segment>
<!-- Section: soma[5] -->
      <segment id="6" name = "Seg0_soma_5" parent="4" cable = "5">  <!-- Parent section: soma[3] -->
        <proximal x="-19.84" y="-164" z="0" diameter="5.87"/>
        <distal x="-22.76" y="-164" z="0" diameter="5.87"/>
      </segment>
<!-- Section: dend4[6] -->
      <segment id="22" name = "Seg0_dend4_6" parent="18" cable = "21">  <!-- Parent section: dend4[2] -->
        <proximal x="-11.08" y="-105.28" z="0" diameter="1.07"/>
        <distal x="-75.3074" y="-23.635" z="0" diameter="1.07"/>
      </segment>
<!-- Section: dend4[5] -->
      <segment id="21" name = "Seg0_dend4_5" parent="18" cable = "20">  <!-- Parent section: dend4[2] -->
        <proximal x="-11.08" y="-105.28" z="0" diameter="0.86"/>
        <distal x="-24.3204" y="7.26383" z="0" diameter="0.86"/>
      </segment>
<!-- Section: dend4[4] -->
      <segment id="20" name = "Seg0_dend4_4" parent="17" cable = "19">  <!-- Parent section: dend4[1] -->
        <proximal x="0.279225" y="-103.562" z="0" diameter="0.86"/>
        <distal x="0.279225" y="-71.1015" z="0" diameter="0.86"/>
      </segment>
<!-- Section: dend4[3] -->
      <segment id="19" name = "Seg0_dend4_3" parent="17" cable = "18">  <!-- Parent section: dend4[1] -->
        <proximal x="0.279225" y="-103.562" z="0" diameter="0.91"/>
        <distal x="13.3091" y="-84.0167" z="0" diameter="0.91"/>
      </segment>
<!-- Section: soma[6] -->
      <segment id="7" name = "Seg0_soma_6" parent="5" cable = "6">  <!-- Parent section: soma[4] -->
        <proximal x="-5.24" y="-164" z="0" diameter="4.92"/>
        <distal x="-2.32" y="-164" z="0" diameter="4.92"/>
      </segment>
<!-- Section: dend2[5] -->
      <segment id="15" name = "Seg0_dend2_5" parent="13" cable = "14">  <!-- Parent section: dend2[3] -->
        <proximal x="-111.359" y="-120.24" z="0" diameter="0.64"/>
        <distal x="-126.781" y="-135.662" z="0" diameter="0.64"/>
      </segment>
<!-- Section: dend2[4] -->
      <segment id="14" name = "Seg0_dend2_4" parent="13" cable = "13">  <!-- Parent section: dend2[3] -->
        <proximal x="-111.359" y="-120.24" z="0" diameter="0.61"/>
        <distal x="-220.009" y="-120.24" z="0" diameter="0.61"/>
      </segment>
<!-- Section: dend1[5] -->
      <segment id="45" name = "Seg0_dend1_5" parent="42" cable = "44">  <!-- Parent section: dend1[2] -->
        <proximal x="-164.51" y="-127.609" z="0" diameter="0.86"/>
        <distal x="-170.422" y="-126.426" z="0" diameter="0.86"/>
      </segment>
<!-- Section: dend1[4] -->
      <segment id="44" name = "Seg0_dend1_4" parent="42" cable = "43">  <!-- Parent section: dend1[2] -->
        <proximal x="-164.51" y="-127.609" z="0" diameter="0.86"/>
        <distal x="-298.417" y="-144.347" z="0" diameter="0.86"/>
      </segment>
<!-- Section: dend1[3] -->
      <segment id="43" name = "Seg0_dend1_3" parent="41" cable = "42">  <!-- Parent section: dend1[1] -->
        <proximal x="-120.757" y="-152.592" z="0" diameter="0.86"/>
        <distal x="-131.724" y="-148.936" z="0" diameter="0.86"/>
      </segment>
<!-- Section: dend7[1] -->
      <segment id="61" name = "Seg0_dend7_1" parent="60" cable = "60">  <!-- Parent section: dend7[0] -->
        <proximal x="-15.0414" y="-173.597" z="0" diameter="0.91"/>
        <distal x="-25.6834" y="-184.239" z="0" diameter="0.91"/>
      </segment>
<!-- Section: soma[7] -->
      <segment id="8" name = "Seg0_soma_7" parent="6" cable = "7">  <!-- Parent section: soma[5] -->
        <proximal x="-22.76" y="-164" z="0" diameter="4.15"/>
        <distal x="-25.68" y="-164" z="0" diameter="4.15"/>
      </segment>
<!-- Section: dend4[12] -->
      <segment id="28" name = "Seg0_dend4_12" parent="22" cable = "27">  <!-- Parent section: dend4[6] -->
        <proximal x="-75.3074" y="-23.635" z="0" diameter="0.96"/>
        <distal x="-111.346" y="-6.81688" z="0" diameter="0.96"/>
      </segment>
<!-- Section: dend4[11] -->
      <segment id="27" name = "Seg0_dend4_11" parent="22" cable = "26">  <!-- Parent section: dend4[6] -->
        <proximal x="-75.3074" y="-23.635" z="0" diameter="0.91"/>
        <distal x="-100.596" y="13.4543" z="0" diameter="0.91"/>
      </segment>
<!-- Section: dend4[10] -->
      <segment id="26" name = "Seg0_dend4_10" parent="20" cable = "25">  <!-- Parent section: dend4[4] -->
        <proximal x="0.279225" y="-71.1015" z="0" diameter="0.86"/>
        <distal x="-7.78179" y="-63.0405" z="0" diameter="0.86"/>
      </segment>
<!-- Section: dend4[9] -->
      <segment id="25" name = "Seg0_dend4_9" parent="20" cable = "24">  <!-- Parent section: dend4[4] -->
        <proximal x="0.279225" y="-71.1015" z="0" diameter="0.91"/>
        <distal x="-16.4101" y="61.3008" z="0" diameter="0.91"/>
      </segment>
<!-- Section: dend4[8] -->
      <segment id="24" name = "Seg0_dend4_8" parent="19" cable = "23">  <!-- Parent section: dend4[3] -->
        <proximal x="13.3091" y="-84.0167" z="0" diameter="0.86"/>
        <distal x="47.674" y="-16.0505" z="0" diameter="0.86"/>
      </segment>
<!-- Section: dend4[7] -->
      <segment id="23" name = "Seg0_dend4_7" parent="19" cable = "22">  <!-- Parent section: dend4[3] -->
        <proximal x="13.3091" y="-84.0167" z="0" diameter="0.88"/>
        <distal x="48.0887" y="-75.3218" z="0" diameter="0.88"/>
      </segment>
<!-- Section: soma[8] -->
      <segment id="9" name = "Seg0_soma_8" parent="7" cable = "8">  <!-- Parent section: soma[6] -->
        <proximal x="-2.32" y="-164" z="0" diameter="3.24"/>
        <distal x="0.599997" y="-164" z="0" diameter="3.24"/>
      </segment>
<!-- Section: dend1[9] -->
      <segment id="49" name = "Seg0_dend1_9" parent="45" cable = "48">  <!-- Parent section: dend1[5] -->
        <proximal x="-170.422" y="-126.426" z="0" diameter="0.86"/>
        <distal x="-214.192" y="-82.6561" z="0" diameter="0.86"/>
      </segment>
<!-- Section: dend1[8] -->
      <segment id="48" name = "Seg0_dend1_8" parent="45" cable = "47">  <!-- Parent section: dend1[5] -->
        <proximal x="-170.422" y="-126.426" z="0" diameter="0.86"/>
        <distal x="-312.032" y="-126.426" z="0" diameter="0.86"/>
      </segment>
<!-- Section: dend1[7] -->
      <segment id="47" name = "Seg0_dend1_7" parent="44" cable = "46">  <!-- Parent section: dend1[4] -->
        <proximal x="-298.417" y="-144.347" z="0" diameter="0.86"/>
        <distal x="-298.417" y="-155.307" z="0" diameter="0.86"/>
      </segment>
<!-- Section: dend1[6] -->
      <segment id="46" name = "Seg0_dend1_6" parent="43" cable = "45">  <!-- Parent section: dend1[3] -->
        <proximal x="-131.724" y="-148.936" z="0" diameter="0.86"/>
        <distal x="-184.884" y="-148.936" z="0" diameter="0.86"/>
      </segment>
<!-- Section: dend7[3] -->
      <segment id="63" name = "Seg0_dend7_3" parent="61" cable = "62">  <!-- Parent section: dend7[1] -->
        <proximal x="-25.6834" y="-184.239" z="0" diameter="0.86"/>
        <distal x="-70.3394" y="-217.731" z="0" diameter="0.86"/>
      </segment>
<!-- Section: dend7[2] -->
      <segment id="62" name = "Seg0_dend7_2" parent="61" cable = "61">  <!-- Parent section: dend7[1] -->
        <proximal x="-25.6834" y="-184.239" z="0" diameter="0.86"/>
        <distal x="-25.6834" y="-195.629" z="0" diameter="0.86"/>
      </segment>
<!-- Section: dend4[20] -->
      <segment id="36" name = "Seg0_dend4_20" parent="28" cable = "35">  <!-- Parent section: dend4[12] -->
        <proximal x="-111.346" y="-6.81688" z="0" diameter="0.88"/>
        <distal x="-187.2" y="5.8254" z="0" diameter="0.88"/>
      </segment>
<!-- Section: dend4[19] -->
      <segment id="35" name = "Seg0_dend4_19" parent="28" cable = "34">  <!-- Parent section: dend4[12] -->
        <proximal x="-111.346" y="-6.81688" z="0" diameter="0.86"/>
        <distal x="-146.56" y="10.7899" z="0" diameter="0.86"/>
      </segment>
<!-- Section: dend4[18] -->
      <segment id="34" name = "Seg0_dend4_18" parent="27" cable = "33">  <!-- Parent section: dend4[11] -->
        <proximal x="-100.596" y="13.4543" z="0" diameter="0.91"/>
        <distal x="-129.552" y="42.4103" z="0" diameter="0.91"/>
      </segment>
<!-- Section: dend4[17] -->
      <segment id="33" name = "Seg0_dend4_17" parent="27" cable = "32">  <!-- Parent section: dend4[11] -->
        <proximal x="-100.596" y="13.4543" z="0" diameter="0.88"/>
        <distal x="-85.3362" y="28.7137" z="0" diameter="0.88"/>
      </segment>
<!-- Section: dend4[16] -->
      <segment id="32" name = "Seg0_dend4_16" parent="26" cable = "31">  <!-- Parent section: dend4[10] -->
        <proximal x="-7.78179" y="-63.0405" z="0" diameter="0.77"/>
        <distal x="-31.5911" y="-51.3376" z="0" diameter="0.77"/>
      </segment>
<!-- Section: dend4[15] -->
      <segment id="31" name = "Seg0_dend4_15" parent="26" cable = "30">  <!-- Parent section: dend4[10] -->
        <proximal x="-7.78179" y="-63.0405" z="0" diameter="0.77"/>
        <distal x="-7.78179" y="-49.2205" z="0" diameter="0.77"/>
      </segment>
<!-- Section: dend4[14] -->
      <segment id="30" name = "Seg0_dend4_14" parent="23" cable = "29">  <!-- Parent section: dend4[7] -->
        <proximal x="48.0887" y="-75.3218" z="0" diameter="0.64"/>
        <distal x="67.784" y="-85.1694" z="0" diameter="0.64"/>
      </segment>
<!-- Section: dend4[13] -->
      <segment id="29" name = "Seg0_dend4_13" parent="23" cable = "28">  <!-- Parent section: dend4[7] -->
        <proximal x="48.0887" y="-75.3218" z="0" diameter="0.86"/>
        <distal x="106.58" y="-63.6235" z="0" diameter="0.86"/>
      </segment>
<!-- Section: dend5 -->
      <segment id="84" name = "Seg0_dend5" parent="9" cable = "83">  <!-- Parent section: soma[8] -->
        <proximal x="0.599997" y="-164" z="0" diameter="0.91"/>
        <distal x="61.9352" y="-139.466" z="0" diameter="0.91"/>
      </segment>
<!-- Section: dend6[0] -->
      <segment id="81" name = "Seg0_dend6_0" parent="9" cable = "80">  <!-- Parent section: soma[8] -->
        <proximal x="0.599997" y="-164" z="0" diameter="1.09"/>
        <distal x="65.07" y="-164" z="0" diameter="1.09"/>
      </segment>
<!-- Section: dend8[0] -->
      <segment id="70" name = "Seg0_dend8_0" parent="9" cable = "69">  <!-- Parent section: soma[8] -->
        <proximal x="0.599997" y="-164" z="0" diameter="0.91"/>
        <distal x="4.86194" y="-172.524" z="0" diameter="0.91"/>
      </segment>
<!-- Section: dend1[10] -->
      <segment id="50" name = "Seg0_dend1_10" parent="46" cable = "49">  <!-- Parent section: dend1[6] -->
        <proximal x="-184.884" y="-148.936" z="0" diameter="0.86"/>
        <distal x="-180.154" y="-153.667" z="0" diameter="0.86"/>
      </segment>
<!-- Section: dend7[8] -->
      <segment id="68" name = "Seg0_dend7_8" parent="63" cable = "67">  <!-- Parent section: dend7[3] -->
        <proximal x="-70.3394" y="-217.731" z="0" diameter="0.77"/>
        <distal x="-173.073" y="-286.22" z="0" diameter="0.77"/>
      </segment>
<!-- Section: dend7[7] -->
      <segment id="67" name = "Seg0_dend7_7" parent="62" cable = "66">  <!-- Parent section: dend7[2] -->
        <proximal x="-25.6834" y="-195.629" z="0" diameter="0.86"/>
        <distal x="-38.6013" y="-234.383" z="0" diameter="0.86"/>
      </segment>
<!-- Section: dend7[6] -->
      <segment id="66" name = "Seg0_dend7_6" parent="62" cable = "65">  <!-- Parent section: dend7[2] -->
        <proximal x="-25.6834" y="-195.629" z="0" diameter="0.86"/>
        <distal x="-25.6834" y="-218.559" z="0" diameter="0.86"/>
      </segment>
<!-- Section: dend7[5] -->
      <segment id="65" name = "Seg0_dend7_5" parent="62" cable = "64">  <!-- Parent section: dend7[2] -->
        <proximal x="-25.6834" y="-195.629" z="0" diameter="0.77"/>
        <distal x="-53.3343" y="-278.582" z="0" diameter="0.77"/>
      </segment>
<!-- Section: dend7[4] -->
      <segment id="64" name = "Seg0_dend7_4" parent="62" cable = "63">  <!-- Parent section: dend7[2] -->
        <proximal x="-25.6834" y="-195.629" z="0" diameter="0.86"/>
        <distal x="-12.4872" y="-200.028" z="0" diameter="0.86"/>
      </segment>
<!-- Section: dend4[21] -->
      <segment id="37" name = "Seg0_dend4_21" parent="31" cable = "36">  <!-- Parent section: dend4[15] -->
        <proximal x="-7.78179" y="-49.2205" z="0" diameter="0.77"/>
        <distal x="14.7874" y="-41.6975" z="0" diameter="0.77"/>
      </segment>
<!-- Section: dend6[2] -->
      <segment id="83" name = "Seg0_dend6_2" parent="81" cable = "82">  <!-- Parent section: dend6[0] -->
        <proximal x="65.07" y="-164" z="0" diameter="0.86"/>
        <distal x="178.38" y="-164" z="0" diameter="0.86"/>
      </segment>
<!-- Section: dend6[1] -->
      <segment id="82" name = "Seg0_dend6_1" parent="81" cable = "81">  <!-- Parent section: dend6[0] -->
        <proximal x="65.07" y="-164" z="0" diameter="0.86"/>
        <distal x="96.8907" y="-171.955" z="0" diameter="0.86"/>
      </segment>
<!-- Section: dend8[4] -->
      <segment id="74" name = "Seg0_dend8_4" parent="70" cable = "73">  <!-- Parent section: dend8[0] -->
        <proximal x="4.86194" y="-172.524" z="0" diameter="0.86"/>
        <distal x="31.3759" y="-179.152" z="0" diameter="0.86"/>
      </segment>
<!-- Section: dend8[3] -->
      <segment id="73" name = "Seg0_dend8_3" parent="70" cable = "72">  <!-- Parent section: dend8[0] -->
        <proximal x="4.86194" y="-172.524" z="0" diameter="0.86"/>
        <distal x="-18.9301" y="-190.368" z="0" diameter="0.86"/>
      </segment>
<!-- Section: dend8[2] -->
      <segment id="72" name = "Seg0_dend8_2" parent="70" cable = "71">  <!-- Parent section: dend8[0] -->
        <proximal x="4.86194" y="-172.524" z="0" diameter="0.77"/>
        <distal x="-83.4101" y="-238.728" z="0" diameter="0.77"/>
      </segment>
<!-- Section: dend8[1] -->
      <segment id="71" name = "Seg0_dend8_1" parent="70" cable = "70">  <!-- Parent section: dend8[0] -->
        <proximal x="4.86194" y="-172.524" z="0" diameter="0.86"/>
        <distal x="9.89213" y="-192.645" z="0" diameter="0.86"/>
      </segment>
<!-- Section: dend1[11] -->
      <segment id="51" name = "Seg0_dend1_11" parent="50" cable = "50">  <!-- Parent section: dend1[10] -->
        <proximal x="-180.154" y="-153.667" z="0" diameter="0.86"/>
        <distal x="-188.108" y="-158.97" z="0" diameter="0.86"/>
      </segment>
<!-- Section: dend7[9] -->
      <segment id="69" name = "Seg0_dend7_9" parent="64" cable = "68">  <!-- Parent section: dend7[4] -->
        <proximal x="-12.4872" y="-200.028" z="0" diameter="0.86"/>
        <distal x="33.3249" y="-269.323" z="0" diameter="0.86"/>
      </segment>
<!-- Section: dend8[5] -->
      <segment id="75" name = "Seg0_dend8_5" parent="71" cable = "74">  <!-- Parent section: dend8[1] -->
        <proximal x="9.89213" y="-192.645" z="0" diameter="0.86"/>
        <distal x="20.2865" y="-223.828" z="0" diameter="0.86"/>
      </segment>
<!-- Section: dend1[13] -->
      <segment id="53" name = "Seg0_dend1_13" parent="51" cable = "52">  <!-- Parent section: dend1[11] -->
        <proximal x="-188.108" y="-158.97" z="0" diameter="0.77"/>
        <distal x="-291.35" y="-173.719" z="0" diameter="0.77"/>
      </segment>
<!-- Section: dend1[12] -->
      <segment id="52" name = "Seg0_dend1_12" parent="51" cable = "51">  <!-- Parent section: dend1[11] -->
        <proximal x="-188.108" y="-158.97" z="0" diameter="0.77"/>
        <distal x="-194.128" y="-171.009" z="0" diameter="0.77"/>
      </segment>
<!-- Section: dend8[7] -->
      <segment id="77" name = "Seg0_dend8_7" parent="75" cable = "76">  <!-- Parent section: dend8[5] -->
        <proximal x="20.2865" y="-223.828" z="0" diameter="0.86"/>
        <distal x="-15.6345" y="-259.749" z="0" diameter="0.86"/>
      </segment>
<!-- Section: dend8[6] -->
      <segment id="76" name = "Seg0_dend8_6" parent="75" cable = "75">  <!-- Parent section: dend8[5] -->
        <proximal x="20.2865" y="-223.828" z="0" diameter="0.86"/>
        <distal x="49.4123" y="-252.954" z="0" diameter="0.86"/>
      </segment>
<!-- Section: dend1[17] -->
      <segment id="57" name = "Seg0_dend1_17" parent="53" cable = "56">  <!-- Parent section: dend1[13] -->
        <proximal x="-291.35" y="-173.719" z="0" diameter="0.64"/>
        <distal x="-319.27" y="-164.412" z="0" diameter="0.64"/>
      </segment>
<!-- Section: dend1[16] -->
      <segment id="56" name = "Seg0_dend1_16" parent="53" cable = "55">  <!-- Parent section: dend1[13] -->
        <proximal x="-291.35" y="-173.719" z="0" diameter="0.77"/>
        <distal x="-305.428" y="-180.758" z="0" diameter="0.77"/>
      </segment>
<!-- Section: dend1[15] -->
      <segment id="55" name = "Seg0_dend1_15" parent="52" cable = "54">  <!-- Parent section: dend1[12] -->
        <proximal x="-194.128" y="-171.009" z="0" diameter="0.77"/>
        <distal x="-204.051" y="-174.316" z="0" diameter="0.77"/>
      </segment>
<!-- Section: dend1[14] -->
      <segment id="54" name = "Seg0_dend1_14" parent="52" cable = "53">  <!-- Parent section: dend1[12] -->
        <proximal x="-194.128" y="-171.009" z="0" diameter="0.77"/>
        <distal x="-164.947" y="-188.517" z="0" diameter="0.77"/>
      </segment>
<!-- Section: dend8[8] -->
      <segment id="78" name = "Seg0_dend8_8" parent="76" cable = "77">  <!-- Parent section: dend8[6] -->
        <proximal x="49.4123" y="-252.954" z="0" diameter="0.64"/>
        <distal x="49.4123" y="-316.314" z="0" diameter="0.64"/>
      </segment>
<!-- Section: dend1[19] -->
      <segment id="59" name = "Seg0_dend1_19" parent="55" cable = "58">  <!-- Parent section: dend1[15] -->
        <proximal x="-204.051" y="-174.316" z="0" diameter="0.77"/>
        <distal x="-305.796" y="-194.665" z="0" diameter="0.77"/>
      </segment>
<!-- Section: dend1[18] -->
      <segment id="58" name = "Seg0_dend1_18" parent="55" cable = "57">  <!-- Parent section: dend1[15] -->
        <proximal x="-204.051" y="-174.316" z="0" diameter="0.77"/>
        <distal x="-212.119" y="-190.452" z="0" diameter="0.77"/>
      </segment>
<!-- Section: dend8[10] -->
      <segment id="80" name = "Seg0_dend8_10" parent="78" cable = "79">  <!-- Parent section: dend8[8] -->
        <proximal x="49.4123" y="-316.314" z="0" diameter="0.64"/>
        <distal x="24.6724" y="-328.684" z="0" diameter="0.64"/>
      </segment>
<!-- Section: dend8[9] -->
      <segment id="79" name = "Seg0_dend8_9" parent="78" cable = "78">  <!-- Parent section: dend8[8] -->
        <proximal x="49.4123" y="-316.314" z="0" diameter="0.64"/>
        <distal x="61.0866" y="-327.988" z="0" diameter="0.64"/>
      </segment>
    </segments>
    <cables  xmlns="http://morphml.org/morphml/schema"> <!-- Changing namespace from neuroml to morphml-->
      <cable id = "0" name = "soma_0" fract_along_parent = "0"/>
      <cable id = "9" name = "dend2_0" fract_along_parent = "0"/>
      <cable id = "1" name = "soma_1" fract_along_parent = "0"/>
      <cable id = "15" name = "dend4_0">
        <meta:properties>
          <meta:property>
            <meta:tag>numberInternalDivisions</meta:tag> <!-- Discetization of model at time of export. Can be overridden by importing application-->
            <meta:value>4</meta:value>
          </meta:property>
        </meta:properties>
      </cable>
      <cable id = "2" name = "soma_2"/>
      <cable id = "37" name = "dend3_0">
        <meta:properties>
          <meta:property>
            <meta:tag>numberInternalDivisions</meta:tag> <!-- Discetization of model at time of export. Can be overridden by importing application-->
            <meta:value>9</meta:value>
          </meta:property>
        </meta:properties>
      </cable>
      <cable id = "10" name = "dend2_1">
        <meta:properties>
          <meta:property>
            <meta:tag>numberInternalDivisions</meta:tag> <!-- Discetization of model at time of export. Can be overridden by importing application-->
            <meta:value>9</meta:value>
          </meta:property>
        </meta:properties>
      </cable>
      <cable id = "39" name = "dend1_0">
        <meta:properties>
          <meta:property>
            <meta:tag>numberInternalDivisions</meta:tag> <!-- Discetization of model at time of export. Can be overridden by importing application-->
            <meta:value>10</meta:value>
          </meta:property>
        </meta:properties>
      </cable>
      <cable id = "3" name = "soma_3"/>
      <cable id = "17" name = "dend4_2">
        <meta:properties>
          <meta:property>
            <meta:tag>numberInternalDivisions</meta:tag> <!-- Discetization of model at time of export. Can be overridden by importing application-->
            <meta:value>3</meta:value>
          </meta:property>
        </meta:properties>
      </cable>
      <cable id = "16" name = "dend4_1">
        <meta:properties>
          <meta:property>
            <meta:tag>numberInternalDivisions</meta:tag> <!-- Discetization of model at time of export. Can be overridden by importing application-->
            <meta:value>3</meta:value>
          </meta:property>
        </meta:properties>
      </cable>
      <cable id = "4" name = "soma_4"/>
      <cable id = "38" name = "dend3_1">
        <meta:properties>
          <meta:property>
            <meta:tag>numberInternalDivisions</meta:tag> <!-- Discetization of model at time of export. Can be overridden by importing application-->
            <meta:value>9</meta:value>
          </meta:property>
        </meta:properties>
      </cable>
      <cable id = "12" name = "dend2_3">
        <meta:properties>
          <meta:property>
            <meta:tag>numberInternalDivisions</meta:tag> <!-- Discetization of model at time of export. Can be overridden by importing application-->
            <meta:value>2</meta:value>
          </meta:property>
        </meta:properties>
      </cable>
      <cable id = "11" name = "dend2_2">
        <meta:properties>
          <meta:property>
            <meta:tag>numberInternalDivisions</meta:tag> <!-- Discetization of model at time of export. Can be overridden by importing application-->
            <meta:value>10</meta:value>
          </meta:property>
        </meta:properties>
      </cable>
      <cable id = "41" name = "dend1_2">
        <meta:properties>
          <meta:property>
            <meta:tag>numberInternalDivisions</meta:tag> <!-- Discetization of model at time of export. Can be overridden by importing application-->
            <meta:value>6</meta:value>
          </meta:property>
        </meta:properties>
      </cable>
      <cable id = "40" name = "dend1_1">
        <meta:properties>
          <meta:property>
            <meta:tag>numberInternalDivisions</meta:tag> <!-- Discetization of model at time of export. Can be overridden by importing application-->
            <meta:value>2</meta:value>
          </meta:property>
        </meta:properties>
      </cable>
      <cable id = "59" name = "dend7_0">
        <meta:properties>
          <meta:property>
            <meta:tag>numberInternalDivisions</meta:tag> <!-- Discetization of model at time of export. Can be overridden by importing application-->
            <meta:value>2</meta:value>
          </meta:property>
        </meta:properties>
      </cable>
      <cable id = "5" name = "soma_5"/>
      <cable id = "21" name = "dend4_6">
        <meta:properties>
          <meta:property>
            <meta:tag>numberInternalDivisions</meta:tag> <!-- Discetization of model at time of export. Can be overridden by importing application-->
            <meta:value>11</meta:value>
          </meta:property>
        </meta:properties>
      </cable>
      <cable id = "20" name = "dend4_5">
        <meta:properties>
          <meta:property>
            <meta:tag>numberInternalDivisions</meta:tag> <!-- Discetization of model at time of export. Can be overridden by importing application-->
            <meta:value>12</meta:value>
          </meta:property>
        </meta:properties>
      </cable>
      <cable id = "19" name = "dend4_4">
        <meta:properties>
          <meta:property>
            <meta:tag>numberInternalDivisions</meta:tag> <!-- Discetization of model at time of export. Can be overridden by importing application-->
            <meta:value>4</meta:value>
          </meta:property>
        </meta:properties>
      </cable>
      <cable id = "18" name = "dend4_3">
        <meta:properties>
          <meta:property>
            <meta:tag>numberInternalDivisions</meta:tag> <!-- Discetization of model at time of export. Can be overridden by importing application-->
            <meta:value>3</meta:value>
          </meta:property>
        </meta:properties>
      </cable>
      <cable id = "6" name = "soma_6"/>
      <cable id = "14" name = "dend2_5">
        <meta:properties>
          <meta:property>
            <meta:tag>numberInternalDivisions</meta:tag> <!-- Discetization of model at time of export. Can be overridden by importing application-->
            <meta:value>3</meta:value>
          </meta:property>
        </meta:properties>
      </cable>
      <cable id = "13" name = "dend2_4">
        <meta:properties>
          <meta:property>
            <meta:tag>numberInternalDivisions</meta:tag> <!-- Discetization of model at time of export. Can be overridden by importing application-->
            <meta:value>11</meta:value>
          </meta:property>
        </meta:properties>
      </cable>
      <cable id = "44" name = "dend1_5"/>
      <cable id = "43" name = "dend1_4">
        <meta:properties>
          <meta:property>
            <meta:tag>numberInternalDivisions</meta:tag> <!-- Discetization of model at time of export. Can be overridden by importing application-->
            <meta:value>14</meta:value>
          </meta:property>
        </meta:properties>
      </cable>
      <cable id = "42" name = "dend1_3">
        <meta:properties>
          <meta:property>
            <meta:tag>numberInternalDivisions</meta:tag> <!-- Discetization of model at time of export. Can be overridden by importing application-->
            <meta:value>2</meta:value>
          </meta:property>
        </meta:properties>
      </cable>
      <cable id = "60" name = "dend7_1">
        <meta:properties>
          <meta:property>
            <meta:tag>numberInternalDivisions</meta:tag> <!-- Discetization of model at time of export. Can be overridden by importing application-->
            <meta:value>2</meta:value>
          </meta:property>
        </meta:properties>
      </cable>
      <cable id = "7" name = "soma_7"/>
      <cable id = "27" name = "dend4_12">
        <meta:properties>
          <meta:property>
            <meta:tag>numberInternalDivisions</meta:tag> <!-- Discetization of model at time of export. Can be overridden by importing application-->
            <meta:value>4</meta:value>
          </meta:property>
        </meta:properties>
      </cable>
      <cable id = "26" name = "dend4_11">
        <meta:properties>
          <meta:property>
            <meta:tag>numberInternalDivisions</meta:tag> <!-- Discetization of model at time of export. Can be overridden by importing application-->
            <meta:value>5</meta:value>
          </meta:property>
        </meta:properties>
      </cable>
      <cable id = "25" name = "dend4_10">
        <meta:properties>
          <meta:property>
            <meta:tag>numberInternalDivisions</meta:tag> <!-- Discetization of model at time of export. Can be overridden by importing application-->
            <meta:value>2</meta:value>
          </meta:property>
        </meta:properties>
      </cable>
      <cable id = "24" name = "dend4_9">
        <meta:properties>
          <meta:property>
            <meta:tag>numberInternalDivisions</meta:tag> <!-- Discetization of model at time of export. Can be overridden by importing application-->
            <meta:value>14</meta:value>
          </meta:property>
        </meta:properties>
      </cable>
      <cable id = "23" name = "dend4_8">
        <meta:properties>
          <meta:property>
            <meta:tag>numberInternalDivisions</meta:tag> <!-- Discetization of model at time of export. Can be overridden by importing application-->
            <meta:value>8</meta:value>
          </meta:property>
        </meta:properties>
      </cable>
      <cable id = "22" name = "dend4_7">
        <meta:properties>
          <meta:property>
            <meta:tag>numberInternalDivisions</meta:tag> <!-- Discetization of model at time of export. Can be overridden by importing application-->
            <meta:value>4</meta:value>
          </meta:property>
        </meta:properties>
      </cable>
      <cable id = "8" name = "soma_8"/>
      <cable id = "48" name = "dend1_9">
        <meta:properties>
          <meta:property>
            <meta:tag>numberInternalDivisions</meta:tag> <!-- Discetization of model at time of export. Can be overridden by importing application-->
            <meta:value>7</meta:value>
          </meta:property>
        </meta:properties>
      </cable>
      <cable id = "47" name = "dend1_8">
        <meta:properties>
          <meta:property>
            <meta:tag>numberInternalDivisions</meta:tag> <!-- Discetization of model at time of export. Can be overridden by importing application-->
            <meta:value>15</meta:value>
          </meta:property>
        </meta:properties>
      </cable>
      <cable id = "46" name = "dend1_7">
        <meta:properties>
          <meta:property>
            <meta:tag>numberInternalDivisions</meta:tag> <!-- Discetization of model at time of export. Can be overridden by importing application-->
            <meta:value>2</meta:value>
          </meta:property>
        </meta:properties>
      </cable>
      <cable id = "45" name = "dend1_6">
        <meta:properties>
          <meta:property>
            <meta:tag>numberInternalDivisions</meta:tag> <!-- Discetization of model at time of export. Can be overridden by importing application-->
            <meta:value>6</meta:value>
          </meta:property>
        </meta:properties>
      </cable>
      <cable id = "62" name = "dend7_3">
        <meta:properties>
          <meta:property>
            <meta:tag>numberInternalDivisions</meta:tag> <!-- Discetization of model at time of export. Can be overridden by importing application-->
            <meta:value>6</meta:value>
          </meta:property>
        </meta:properties>
      </cable>
      <cable id = "61" name = "dend7_2">
        <meta:properties>
          <meta:property>
            <meta:tag>numberInternalDivisions</meta:tag> <!-- Discetization of model at time of export. Can be overridden by importing application-->
            <meta:value>2</meta:value>
          </meta:property>
        </meta:properties>
      </cable>
      <cable id = "35" name = "dend4_20">
        <meta:properties>
          <meta:property>
            <meta:tag>numberInternalDivisions</meta:tag> <!-- Discetization of model at time of export. Can be overridden by importing application-->
            <meta:value>8</meta:value>
          </meta:property>
        </meta:properties>
      </cable>
      <cable id = "34" name = "dend4_19">
        <meta:properties>
          <meta:property>
            <meta:tag>numberInternalDivisions</meta:tag> <!-- Discetization of model at time of export. Can be overridden by importing application-->
            <meta:value>4</meta:value>
          </meta:property>
        </meta:properties>
      </cable>
      <cable id = "33" name = "dend4_18">
        <meta:properties>
          <meta:property>
            <meta:tag>numberInternalDivisions</meta:tag> <!-- Discetization of model at time of export. Can be overridden by importing application-->
            <meta:value>5</meta:value>
          </meta:property>
        </meta:properties>
      </cable>
      <cable id = "32" name = "dend4_17">
        <meta:properties>
          <meta:property>
            <meta:tag>numberInternalDivisions</meta:tag> <!-- Discetization of model at time of export. Can be overridden by importing application-->
            <meta:value>3</meta:value>
          </meta:property>
        </meta:properties>
      </cable>
      <cable id = "31" name = "dend4_16">
        <meta:properties>
          <meta:property>
            <meta:tag>numberInternalDivisions</meta:tag> <!-- Discetization of model at time of export. Can be overridden by importing application-->
            <meta:value>3</meta:value>
          </meta:property>
        </meta:properties>
      </cable>
      <cable id = "30" name = "dend4_15">
        <meta:properties>
          <meta:property>
            <meta:tag>numberInternalDivisions</meta:tag> <!-- Discetization of model at time of export. Can be overridden by importing application-->
            <meta:value>2</meta:value>
          </meta:property>
        </meta:properties>
      </cable>
      <cable id = "29" name = "dend4_14">
        <meta:properties>
          <meta:property>
            <meta:tag>numberInternalDivisions</meta:tag> <!-- Discetization of model at time of export. Can be overridden by importing application-->
            <meta:value>3</meta:value>
          </meta:property>
        </meta:properties>
      </cable>
      <cable id = "28" name = "dend4_13">
        <meta:properties>
          <meta:property>
            <meta:tag>numberInternalDivisions</meta:tag> <!-- Discetization of model at time of export. Can be overridden by importing application-->
            <meta:value>6</meta:value>
          </meta:property>
        </meta:properties>
      </cable>
      <cable id = "83" name = "dend5">
        <meta:properties>
          <meta:property>
            <meta:tag>numberInternalDivisions</meta:tag> <!-- Discetization of model at time of export. Can be overridden by importing application-->
            <meta:value>7</meta:value>
          </meta:property>
        </meta:properties>
      </cable>
      <cable id = "80" name = "dend6_0">
        <meta:properties>
          <meta:property>
            <meta:tag>numberInternalDivisions</meta:tag> <!-- Discetization of model at time of export. Can be overridden by importing application-->
            <meta:value>7</meta:value>
          </meta:property>
        </meta:properties>
      </cable>
      <cable id = "69" name = "dend8_0"/>
      <cable id = "49" name = "dend1_10"/>
      <cable id = "67" name = "dend7_8">
        <meta:properties>
          <meta:property>
            <meta:tag>numberInternalDivisions</meta:tag> <!-- Discetization of model at time of export. Can be overridden by importing application-->
            <meta:value>13</meta:value>
          </meta:property>
        </meta:properties>
      </cable>
      <cable id = "66" name = "dend7_7">
        <meta:properties>
          <meta:property>
            <meta:tag>numberInternalDivisions</meta:tag> <!-- Discetization of model at time of export. Can be overridden by importing application-->
            <meta:value>5</meta:value>
          </meta:property>
        </meta:properties>
      </cable>
      <cable id = "65" name = "dend7_6">
        <meta:properties>
          <meta:property>
            <meta:tag>numberInternalDivisions</meta:tag> <!-- Discetization of model at time of export. Can be overridden by importing application-->
            <meta:value>3</meta:value>
          </meta:property>
        </meta:properties>
      </cable>
      <cable id = "64" name = "dend7_5">
        <meta:properties>
          <meta:property>
            <meta:tag>numberInternalDivisions</meta:tag> <!-- Discetization of model at time of export. Can be overridden by importing application-->
            <meta:value>9</meta:value>
          </meta:property>
        </meta:properties>
      </cable>
      <cable id = "63" name = "dend7_4">
        <meta:properties>
          <meta:property>
            <meta:tag>numberInternalDivisions</meta:tag> <!-- Discetization of model at time of export. Can be overridden by importing application-->
            <meta:value>2</meta:value>
          </meta:property>
        </meta:properties>
      </cable>
      <cable id = "36" name = "dend4_21">
        <meta:properties>
          <meta:property>
            <meta:tag>numberInternalDivisions</meta:tag> <!-- Discetization of model at time of export. Can be overridden by importing application-->
            <meta:value>3</meta:value>
          </meta:property>
        </meta:properties>
      </cable>
      <cable id = "82" name = "dend6_2">
        <meta:properties>
          <meta:property>
            <meta:tag>numberInternalDivisions</meta:tag> <!-- Discetization of model at time of export. Can be overridden by importing application-->
            <meta:value>12</meta:value>
          </meta:property>
        </meta:properties>
      </cable>
      <cable id = "81" name = "dend6_1">
        <meta:properties>
          <meta:property>
            <meta:tag>numberInternalDivisions</meta:tag> <!-- Discetization of model at time of export. Can be overridden by importing application-->
            <meta:value>4</meta:value>
          </meta:property>
        </meta:properties>
      </cable>
      <cable id = "73" name = "dend8_4">
        <meta:properties>
          <meta:property>
            <meta:tag>numberInternalDivisions</meta:tag> <!-- Discetization of model at time of export. Can be overridden by importing application-->
            <meta:value>3</meta:value>
          </meta:property>
        </meta:properties>
      </cable>
      <cable id = "72" name = "dend8_3">
        <meta:properties>
          <meta:property>
            <meta:tag>numberInternalDivisions</meta:tag> <!-- Discetization of model at time of export. Can be overridden by importing application-->
            <meta:value>3</meta:value>
          </meta:property>
        </meta:properties>
      </cable>
      <cable id = "71" name = "dend8_2">
        <meta:properties>
          <meta:property>
            <meta:tag>numberInternalDivisions</meta:tag> <!-- Discetization of model at time of export. Can be overridden by importing application-->
            <meta:value>12</meta:value>
          </meta:property>
        </meta:properties>
      </cable>
      <cable id = "70" name = "dend8_1">
        <meta:properties>
          <meta:property>
            <meta:tag>numberInternalDivisions</meta:tag> <!-- Discetization of model at time of export. Can be overridden by importing application-->
            <meta:value>3</meta:value>
          </meta:property>
        </meta:properties>
      </cable>
      <cable id = "50" name = "dend1_11"/>
      <cable id = "68" name = "dend7_9">
        <meta:properties>
          <meta:property>
            <meta:tag>numberInternalDivisions</meta:tag> <!-- Discetization of model at time of export. Can be overridden by importing application-->
            <meta:value>9</meta:value>
          </meta:property>
        </meta:properties>
      </cable>
      <cable id = "74" name = "dend8_5">
        <meta:properties>
          <meta:property>
            <meta:tag>numberInternalDivisions</meta:tag> <!-- Discetization of model at time of export. Can be overridden by importing application-->
            <meta:value>4</meta:value>
          </meta:property>
        </meta:properties>
      </cable>
      <cable id = "52" name = "dend1_13">
        <meta:properties>
          <meta:property>
            <meta:tag>numberInternalDivisions</meta:tag> <!-- Discetization of model at time of export. Can be overridden by importing application-->
            <meta:value>11</meta:value>
          </meta:property>
        </meta:properties>
      </cable>
      <cable id = "51" name = "dend1_12">
        <meta:properties>
          <meta:property>
            <meta:tag>numberInternalDivisions</meta:tag> <!-- Discetization of model at time of export. Can be overridden by importing application-->
            <meta:value>2</meta:value>
          </meta:property>
        </meta:properties>
      </cable>
      <cable id = "76" name = "dend8_7">
        <meta:properties>
          <meta:property>
            <meta:tag>numberInternalDivisions</meta:tag> <!-- Discetization of model at time of export. Can be overridden by importing application-->
            <meta:value>6</meta:value>
          </meta:property>
        </meta:properties>
      </cable>
      <cable id = "75" name = "dend8_6">
        <meta:properties>
          <meta:property>
            <meta:tag>numberInternalDivisions</meta:tag> <!-- Discetization of model at time of export. Can be overridden by importing application-->
            <meta:value>5</meta:value>
          </meta:property>
        </meta:properties>
      </cable>
      <cable id = "56" name = "dend1_17">
        <meta:properties>
          <meta:property>
            <meta:tag>numberInternalDivisions</meta:tag> <!-- Discetization of model at time of export. Can be overridden by importing application-->
            <meta:value>3</meta:value>
          </meta:property>
        </meta:properties>
      </cable>
      <cable id = "55" name = "dend1_16">
        <meta:properties>
          <meta:property>
            <meta:tag>numberInternalDivisions</meta:tag> <!-- Discetization of model at time of export. Can be overridden by importing application-->
            <meta:value>2</meta:value>
          </meta:property>
        </meta:properties>
      </cable>
      <cable id = "54" name = "dend1_15">
        <meta:properties>
          <meta:property>
            <meta:tag>numberInternalDivisions</meta:tag> <!-- Discetization of model at time of export. Can be overridden by importing application-->
            <meta:value>2</meta:value>
          </meta:property>
        </meta:properties>
      </cable>
      <cable id = "53" name = "dend1_14">
        <meta:properties>
          <meta:property>
            <meta:tag>numberInternalDivisions</meta:tag> <!-- Discetization of model at time of export. Can be overridden by importing application-->
            <meta:value>4</meta:value>
          </meta:property>
        </meta:properties>
      </cable>
      <cable id = "77" name = "dend8_8">
        <meta:properties>
          <meta:property>
            <meta:tag>numberInternalDivisions</meta:tag> <!-- Discetization of model at time of export. Can be overridden by importing application-->
            <meta:value>7</meta:value>
          </meta:property>
        </meta:properties>
      </cable>
      <cable id = "58" name = "dend1_19">
        <meta:properties>
          <meta:property>
            <meta:tag>numberInternalDivisions</meta:tag> <!-- Discetization of model at time of export. Can be overridden by importing application-->
            <meta:value>11</meta:value>
          </meta:property>
        </meta:properties>
      </cable>
      <cable id = "57" name = "dend1_18">
        <meta:properties>
          <meta:property>
            <meta:tag>numberInternalDivisions</meta:tag> <!-- Discetization of model at time of export. Can be overridden by importing application-->
            <meta:value>2</meta:value>
          </meta:property>
        </meta:properties>
      </cable>
      <cable id = "79" name = "dend8_10">
        <meta:properties>
          <meta:property>
            <meta:tag>numberInternalDivisions</meta:tag> <!-- Discetization of model at time of export. Can be overridden by importing application-->
            <meta:value>3</meta:value>
          </meta:property>
        </meta:properties>
      </cable>
      <cable id = "78" name = "dend8_9">
        <meta:properties>
          <meta:property>
            <meta:tag>numberInternalDivisions</meta:tag> <!-- Discetization of model at time of export. Can be overridden by importing application-->
            <meta:value>2</meta:value>
          </meta:property>
        </meta:properties>
      </cable>
      <cablegroup name="all"> <!-- Replacing subset name ModelViewParmSubset_0 with all, as it contains all sections -->
        <cable id = "0"/>
        <cable id = "9"/>
        <cable id = "1"/>
        <cable id = "15"/>
        <cable id = "2"/>
        <cable id = "37"/>
        <cable id = "10"/>
        <cable id = "39"/>
        <cable id = "3"/>
        <cable id = "17"/>
        <cable id = "16"/>
        <cable id = "4"/>
        <cable id = "38"/>
        <cable id = "12"/>
        <cable id = "11"/>
        <cable id = "41"/>
        <cable id = "40"/>
        <cable id = "59"/>
        <cable id = "5"/>
        <cable id = "21"/>
        <cable id = "20"/>
        <cable id = "19"/>
        <cable id = "18"/>
        <cable id = "6"/>
        <cable id = "14"/>
        <cable id = "13"/>
        <cable id = "44"/>
        <cable id = "43"/>
        <cable id = "42"/>
        <cable id = "60"/>
        <cable id = "7"/>
        <cable id = "27"/>
        <cable id = "26"/>
        <cable id = "25"/>
        <cable id = "24"/>
        <cable id = "23"/>
        <cable id = "22"/>
        <cable id = "8"/>
        <cable id = "48"/>
        <cable id = "47"/>
        <cable id = "46"/>
        <cable id = "45"/>
        <cable id = "62"/>
        <cable id = "61"/>
        <cable id = "35"/>
        <cable id = "34"/>
        <cable id = "33"/>
        <cable id = "32"/>
        <cable id = "31"/>
        <cable id = "30"/>
        <cable id = "29"/>
        <cable id = "28"/>
        <cable id = "83"/>
        <cable id = "80"/>
        <cable id = "69"/>
        <cable id = "49"/>
        <cable id = "67"/>
        <cable id = "66"/>
        <cable id = "65"/>
        <cable id = "64"/>
        <cable id = "63"/>
        <cable id = "36"/>
        <cable id = "82"/>
        <cable id = "81"/>
        <cable id = "73"/>
        <cable id = "72"/>
        <cable id = "71"/>
        <cable id = "70"/>
        <cable id = "50"/>
        <cable id = "68"/>
        <cable id = "74"/>
        <cable id = "52"/>
        <cable id = "51"/>
        <cable id = "76"/>
        <cable id = "75"/>
        <cable id = "56"/>
        <cable id = "55"/>
        <cable id = "54"/>
        <cable id = "53"/>
        <cable id = "77"/>
        <cable id = "58"/>
        <cable id = "57"/>
        <cable id = "79"/>
        <cable id = "78"/>
      </cablegroup>
      <cablegroup name="ModelViewParmSubset_1">
        <cable id = "0"/>
        <cable id = "1"/>
        <cable id = "2"/>
        <cable id = "3"/>
        <cable id = "4"/>
        <cable id = "5"/>
        <cable id = "6"/>
        <cable id = "7"/>
        <cable id = "8"/>
      </cablegroup>
      <cablegroup name="ModelViewParmSubset_2">
        <cable id = "9"/>
        <cable id = "15"/>
        <cable id = "37"/>
        <cable id = "10"/>
        <cable id = "39"/>
        <cable id = "17"/>
        <cable id = "16"/>
        <cable id = "38"/>
        <cable id = "12"/>
        <cable id = "11"/>
        <cable id = "41"/>
        <cable id = "40"/>
        <cable id = "59"/>
        <cable id = "21"/>
        <cable id = "20"/>
        <cable id = "19"/>
        <cable id = "18"/>
        <cable id = "14"/>
        <cable id = "13"/>
        <cable id = "44"/>
        <cable id = "43"/>
        <cable id = "42"/>
        <cable id = "60"/>
        <cable id = "27"/>
        <cable id = "26"/>
        <cable id = "25"/>
        <cable id = "24"/>
        <cable id = "23"/>
        <cable id = "22"/>
        <cable id = "48"/>
        <cable id = "47"/>
        <cable id = "46"/>
        <cable id = "45"/>
        <cable id = "62"/>
        <cable id = "61"/>
        <cable id = "35"/>
        <cable id = "34"/>
        <cable id = "33"/>
        <cable id = "32"/>
        <cable id = "31"/>
        <cable id = "30"/>
        <cable id = "29"/>
        <cable id = "28"/>
        <cable id = "83"/>
        <cable id = "80"/>
        <cable id = "69"/>
        <cable id = "49"/>
        <cable id = "67"/>
        <cable id = "66"/>
        <cable id = "65"/>
        <cable id = "64"/>
        <cable id = "63"/>
        <cable id = "36"/>
        <cable id = "82"/>
        <cable id = "81"/>
        <cable id = "73"/>
        <cable id = "72"/>
        <cable id = "71"/>
        <cable id = "70"/>
        <cable id = "50"/>
        <cable id = "68"/>
        <cable id = "74"/>
        <cable id = "52"/>
        <cable id = "51"/>
        <cable id = "76"/>
        <cable id = "75"/>
        <cable id = "56"/>
        <cable id = "55"/>
        <cable id = "54"/>
        <cable id = "53"/>
        <cable id = "77"/>
        <cable id = "58"/>
        <cable id = "57"/>
        <cable id = "79"/>
        <cable id = "78"/>
      </cablegroup>
    </cables>
    <biophysics  units = "Physiological Units"> <!-- Note: values of cond dens are different in NEURON and phy units-->
      <bio:mechanism name="IA" type="Channel Mechanism">
        <bio:parameter name="gkAbar" value="0.0165">
          <bio:group>ModelViewParmSubset_1</bio:group>
        </bio:parameter>
      </bio:mechanism>
      <bio:mechanism name="Ih" type="Channel Mechanism">
        <bio:parameter name="gkhbar" value="0.001385">
          <bio:group>ModelViewParmSubset_1</bio:group>
        </bio:parameter>
      </bio:mechanism>
      <bio:mechanism name="Kdend" type="Channel Mechanism">
        <bio:parameter name="gkdend" value="0.023">
          <bio:group>ModelViewParmSubset_2</bio:group>
        </bio:parameter>
      </bio:mechanism>
      <bio:mechanism name="Ksoma" type="Channel Mechanism">
        <bio:parameter name="gksoma" value="0.0319">
          <bio:group>ModelViewParmSubset_1</bio:group>
        </bio:parameter>
      </bio:mechanism>
      <bio:mechanism name="Nadend" type="Channel Mechanism">
        <bio:parameter name="gnadend" value="0.0117">
          <bio:group>ModelViewParmSubset_2</bio:group>
        </bio:parameter>
        <bio:parameter name="gl" value="5e-05">
          <bio:group>ModelViewParmSubset_2</bio:group>
        </bio:parameter>
        <bio:parameter name="el" value="-70">
          <bio:group>ModelViewParmSubset_2</bio:group>
        </bio:parameter>
      </bio:mechanism>
      <bio:mechanism name="Nasoma" type="Channel Mechanism">
        <bio:parameter name="gnasoma" value="0.0107">
          <bio:group>ModelViewParmSubset_1</bio:group>
        </bio:parameter>
        <bio:parameter name="gl" value="5e-05">
          <bio:group>ModelViewParmSubset_1</bio:group>
        </bio:parameter>
        <bio:parameter name="el" value="-70">
          <bio:group>ModelViewParmSubset_1</bio:group>
        </bio:parameter>
      </bio:mechanism>
      <bio:spec_capacitance>
        <bio:parameter value="1.3">
          <bio:group>all</bio:group>
        </bio:parameter>
      </bio:spec_capacitance>
      <bio:spec_axial_resistance>
        <bio:parameter value="0.15">
          <bio:group>all</bio:group>
        </bio:parameter>
      </bio:spec_axial_resistance>
    </biophysics>
  </cell>
</cells>
</neuroml>
